// SBML level 2 version 4

function Constant_flux__irreversible(v)
  v;
end
Constant_flux__irreversible is "Constant flux (irreversible)";

model ASH_Calcium_signalling_1()
  // Ca signalling in C. elegans ASH neurons from the following paper:
  // Mirzakhalili E, Epureanu BI, Gourgou E (2018) A mathematical and computational model of the calcium dynamics in Caenorhabditis elegans ASH sensory neuron. PLoS ONE 13(7): e0201302. https://doi.org/10.1371/journal.pone.0201302
  // SBML implementation by M.I. Stefan

  // Compartments:
  compartment cytosol = 1;
  compartment ER = 1/gamma;

  // Species:
  substanceOnly species P0 in cytosol = 0;
  substanceOnly species P1 in cytosol = 0;
  substanceOnly species P2 in cytosol = 0;
  substanceOnly species O in cytosol = -3.782297e-40;
  substanceOnly species I in cytosol = 0.9999986;
  substanceOnly species Ca in cytosol = 0.2600226;
  substanceOnly species P in cytosol = 0;
  substanceOnly species Ca_ER in ER = 1.466176;

  // Parameters:
  G_LeakER = 0.01;
  J_Leak = 0.39;
  c_ER = 0;
  gamma = 5.4;
  G_PMCA = 14.81;
  K_PMCA = 0.6;
  G_SERCA = 5.78;
  K_SERCA = 0.1;
  G_TRPV = 0.03;
  c_ES = 2000;
  kf_O = 0.04;
  kr_O = 0.05;
  kf_I = 0.01;
  kr_I = 1.39;
  kf_P1 = 0.44;
  kr_P1 = 0.29;
  kf_P2 = 0.24;
  K_P2 = 14.04;
  kr_P2 = 1.09;
  kf_P0 = 6.61;
  S = 0;
  K_P0 = 11.77;
  kr_P0 = 0.3;
  G_IPR = 0.3;
  K_1 = 0.138;
  K_5 = 0.082;
  kr_2 = 0.21;
  kr_4 = 0.029;
  K_2 = 1.05;
  K_4 = 0.144;
  K_3 = 0.943;
  kf_p = 8.6;
  K_p = 14.04;
  kr_p = 3.63;
  K_c = 0.23;
  G_VGCC = 0;
  z = 2;
  // Faraday constant
  F = 96485;
  R = 5;
  T = 300;
  V_max = 10;
  V_rest = -70;
  R_max = 1300000;
  K_d = 2.5;
  n = 1.7;
  R_min = -2000000;
  FRET = 0;
  amount_to_particle_factor = 6.022141e17;
  V = -39.77722;
  y = 0.6435843;
  Initial_for_G_PMCA = G_PMCA;
  Initial_for_G_SERCA = G_SERCA;
  Initial_for_G_TRPV = G_TRPV;
  Initial_for_K_1 = K_1;
  Initial_for_K_2 = K_2;
  Initial_for_K_4 = K_4;
  Initial_for_K_P0 = K_P0;
  Initial_for_K_P2 = K_P2;
  Initial_for_K_PMCA = K_PMCA;
  Initial_for_K_SERCA = K_SERCA;
  Initial_for_K_c = K_c;
  Initial_for_K_p = K_p;
  Initial_for_c_ES = c_ES;
  Initial_for_kf_P0 = kf_P0;
  Initial_for_kf_P2 = kf_P2;
  Initial_for_kf_p = kf_p;
  Initial_for_kr_2 = kr_2;
  Initial_for_kr_4 = kr_4;

  // Assignment rules:
  J_PMCA := Initial_for_G_PMCA*(Ca*amount_to_particle_factor/amount_to_particle_factor/cytosol)^2/((Ca*amount_to_particle_factor/amount_to_particle_factor/cytosol)^2 + Initial_for_K_PMCA);
  J_SERCA := Initial_for_G_SERCA*((Ca*amount_to_particle_factor/amount_to_particle_factor/cytosol)^2/((Ca*amount_to_particle_factor/amount_to_particle_factor/cytosol)^2 + Initial_for_K_SERCA));
  J_TRPV := Initial_for_G_TRPV*(O*amount_to_particle_factor/amount_to_particle_factor/cytosol)*(I*amount_to_particle_factor/amount_to_particle_factor/cytosol)*(Initial_for_c_ES - Ca*amount_to_particle_factor/amount_to_particle_factor/cytosol);
  O_IPR := (P*amount_to_particle_factor/amount_to_particle_factor/cytosol*(Ca*amount_to_particle_factor/amount_to_particle_factor/cytosol)*(1 - y)/((P*amount_to_particle_factor/amount_to_particle_factor/cytosol + K_1)*(Ca*amount_to_particle_factor/amount_to_particle_factor/cytosol + K_5)))^3;
  J_IPR := G_IPR*O_IPR*(Ca*amount_to_particle_factor/amount_to_particle_factor/cytosol - Ca_ER*amount_to_particle_factor/amount_to_particle_factor/ER);
  phi_1 := Initial_for_kr_2*(Ca*amount_to_particle_factor/amount_to_particle_factor/cytosol)*(Initial_for_kr_4*Initial_for_K_1*Initial_for_K_2 + Initial_for_K_4*(P*amount_to_particle_factor/amount_to_particle_factor/cytosol))/(Initial_for_K_4*K_2*(Initial_for_K_1 + P*amount_to_particle_factor/amount_to_particle_factor/cytosol));
  phi_2 := kr_2*(P*amount_to_particle_factor/amount_to_particle_factor/cytosol + kr_4*K_3)/(K_3 + P*amount_to_particle_factor/amount_to_particle_factor/cytosol);
  k_P2_production := Initial_for_kf_P2*(P0*amount_to_particle_factor/amount_to_particle_factor/cytosol)/(P0*amount_to_particle_factor/amount_to_particle_factor/cytosol + Initial_for_K_P2);
  k_IP3_production := Initial_for_kf_p*(P1*amount_to_particle_factor/amount_to_particle_factor/cytosol)/(1 + (Initial_for_K_p*(P2*amount_to_particle_factor/amount_to_particle_factor/cytosol))^4)*((Ca*amount_to_particle_factor/amount_to_particle_factor/cytosol)^2/((Ca*amount_to_particle_factor/amount_to_particle_factor/cytosol)^2 + Initial_for_K_c^2));
  beta_prime := (260*(Ca/cytosol) - 20)/(exp(13*(Ca/cytosol) - 1) - 1);
  k_Y_elimination := phi_2;
  J_Leak_ER := G_LeakER*(Ca_ER*amount_to_particle_factor/amount_to_particle_factor/ER - Ca*amount_to_particle_factor/amount_to_particle_factor/cytosol);
  beta := 0.02*(V - 1.31)/(exp((V - 1.31)/5.36) - 1);
  alpha_prime := (-26*(Ca/cytosol) + 4)/(exp(-26*(Ca/cytosol) + 4) - 1);
  Delta_R := R_max*((Ca*amount_to_particle_factor/amount_to_particle_factor/cytosol)^n/((Ca*amount_to_particle_factor/amount_to_particle_factor/cytosol)^n + K_d));
  alpha := 1.6/(1 + exp(-0.072*(V - 5)));
  m := alpha/(alpha + beta);
  J_VGCC := G_VGCC*m^2*V*(1/2*(Ca*amount_to_particle_factor/amount_to_particle_factor/cytosol) + (-1/2*c_ES));
  k_P0_production := Initial_for_kf_P0*(S/(S + Initial_for_K_P0));
  R_0 := 100*R/(FRET + 100);

  // Rate rules:
  V' = alpha_prime*(V_max - V) - beta_prime*(V - V_rest);
  y' = phi_1*(1 - y) - phi_2*y;

  // Reactions:
  // Constant flux
  // k_P0_production
  P0_production: => P0; cytosol*Constant_flux__irreversible(k_P0_production);
  // mass action (irreversible)
  // kr_P0
  P0_elimination: P0 => ; kr_P0*P0;
  // Mass action (irreversible)
  // kf_P1
  P1_production: P0 => P0 + P1; kf_P1*P0;
  // Mass action
  // kr_P1
  P1_elimination: P1 => ; kr_P1*P1;
  // Constant flux
  // k_P2_production
  P2_production: => P2; cytosol*Constant_flux__irreversible(k_P2_production);
  // Mass action (irreversible)
  // kr_P2
  P2_elimination: P2 => ; kr_P2*P2;
  // Both rates being the same looks weird, but is not a mistake. See equation 6 in the paper
  // Mass action (reversible)
  // kf_O
  // kf_O
  O_activation: P1 -> P1 + O; cytosol*(kf_O*(P1/cytosol) - kr_O*(P1/cytosol)*(O/cytosol));
  // Mass action (irreversible)
  // kr_O
  O_inactivation: O => ; kr_O*O;
  // Constant flux
  // kf_I
  I_production: => I; cytosol*Constant_flux__irreversible(kf_I);
  // Mass action
  // kf_I
  I_elimination: I => ; kf_I*I;
  // Mass action (irreversible)
  // kr_I
  I_inactivation: P2 + I => P2; kr_I*P2*(I/cytosol);
  // Constant flux (irreversible)
  // v = J_TRPV
  Ca_influx_through_TRPV: => Ca; cytosol*Constant_flux__irreversible(J_TRPV);
  // Mass action (irreversible)
  // J_PMCA
  Ca_elimination_through_PMCA_Pump: Ca => ; J_PMCA*Ca;
  // Mass action (irreversible)
  // J_SERCA
  Ca_into_ER_through_SERCA_Pump: Ca => Ca_ER; J_SERCA*(Ca/cytosol);
  // Constant flux
  // k_IP3_production
  IP3_production: => P; cytosol*Constant_flux__irreversible(k_IP3_production);
  // Mass action (irreversible)
  // kr_p
  IP3_elimination: P => ; kr_p*P;
  // Mass action (irreversible)
  // J_IPR
  Ca_influx_through_IP3R_from_ER: Ca_ER => Ca; J_IPR*(Ca_ER/ER);
  // Constant flux
  // J_VGCC
  Ca_influx_through_VGCC: => Ca; cytosol*Constant_flux__irreversible(J_VGCC);
  // Mass action (irreversible)
  // J_Leak_ER
  Ca_influx_through_leak_from_ER: Ca_ER => Ca; J_Leak_ER*(Ca_ER/ER);
  // Constant flux
  // J_Leak
  Ca_influx_through_leak: => Ca; cytosol*Constant_flux__irreversible(J_Leak);

  // Events:
  Stimulus_on: at ((time >= 30) && (time <= 60)): S = 200;
  Stimulus_off: at (time > 60): S = 0;

  // Unit definitions:
  unit length = metre;
  unit area = metre^2;
  unit volume = litre;
  unit time = second;
  unit substance = 1e-6 mole;
end
